<Lems>

    <!--

        This LEMS file has been automatically generated using PyNeuroML v0.7.6 (libNeuroML v0.4.2)

     -->

    <!-- Specify which component to run -->
    <Target component="Sim_Recording"/>

    <!-- Include core NeuroML2 ComponentType definitions -->
    <Include file="Cells.xml"/>
    <Include file="Networks.xml"/>
    <Include file="Simulation.xml"/>

    <Include file="Recording/pyr_4_sym.cell.nml"/>
    <Include file="Recording/Ca_conc.nml"/>
    <Include file="Recording/Ca_pyr.channel.nml"/>
    <Include file="Recording/Kahp_pyr.channel.nml"/>
    <Include file="Recording/Kdr_pyr.channel.nml"/>
    <Include file="Recording/LeakConductance_pyr.channel.nml"/>
    <Include file="Recording/Na_pyr.channel.nml"/>
    <Include file="Recording.net.nml"/>

    <Simulation id="Sim_Recording" length="500ms" step="0.005ms" target="Recording" seed="12345">  <!-- Note seed: ensures same random numbers used every run -->

        <Display id="DispPop__pop0" title="Membrane potentials of cells in pop0" timeScale="1ms" xmin="-50.0" xmax="550.0" ymin="-90" ymax="50">
            <Line id="pop0[0]: v" quantity="pop0/0/pyr_4_sym/v" scale="1mV" color="#d54f33" timeScale="1ms"/>
            <Line id="pop0[1]: v" quantity="pop0/1/pyr_4_sym/v" scale="1mV" color="#0534e4" timeScale="1ms"/>
            <Line id="pop0[2]: v" quantity="pop0/2/pyr_4_sym/v" scale="1mV" color="#98e752" timeScale="1ms"/>
            <Line id="pop0[3]: v" quantity="pop0/3/pyr_4_sym/v" scale="1mV" color="#bca074" timeScale="1ms"/>
            <Line id="pop0[4]: v" quantity="pop0/4/pyr_4_sym/v" scale="1mV" color="#632794" timeScale="1ms"/>
        </Display>

        <OutputFile id="Volts_file__pop0" fileName="Sim_Recording.pop0.v.dat">
            <OutputColumn id="v_pop0_0_pyr_4_sym_v" quantity="pop0/0/pyr_4_sym/v"/>
            <OutputColumn id="v_pop0_1_pyr_4_sym_v" quantity="pop0/1/pyr_4_sym/v"/>
            <OutputColumn id="v_pop0_2_pyr_4_sym_v" quantity="pop0/2/pyr_4_sym/v"/>
            <OutputColumn id="v_pop0_3_pyr_4_sym_v" quantity="pop0/3/pyr_4_sym/v"/>
            <OutputColumn id="v_pop0_4_pyr_4_sym_v" quantity="pop0/4/pyr_4_sym/v"/>
        </OutputFile>

    </Simulation>

</Lems>
